// SBML level 2 version 4
// dcterms:bibliographicCitation: urn:miriam:pubmed:28487363

function Constant_flux__irreversible(v)
  v;
end
Constant_flux__irreversible is "Constant flux (irreversible)";

function Function_for_Triosephosphate_Isomerase(Kmf_tpi, Vf_tpi, cell, DHAP, switch_kashi)
  Vf_tpi*DHAP/(Kmf_tpi + DHAP)*switch_kashi/cell;
end

function Function_for_re48(K_up, Km_AMP_2, X_up, cell, f_up_eq, h, AMP, G1P, UDPG)
  X_up*(K_up*G1P - UDPG*f_up_eq)/(1 + Km_AMP_2^h/AMP^h)/cell;
end

function Function_for_re58(Km_G1P, Km_GBP, Kmf_GBPS, Kmr_GBPS, Vf_GBPS, Vr_GBPS, cell, _13BPG, _3PG, G1P, G16BP, switch_kashi)
  (Vf_GBPS*_13BPG/(Kmf_GBPS*(1 + Km_G1P/G1P)) - Vr_GBPS*_3PG/(Kmr_GBPS*(1 + Km_GBP/G16BP)))/(1 + _13BPG/Kmf_GBPS + _3PG/Kmr_GBPS)*switch_kashi/cell;
end

function Function_for_Glyceraldehyde_3_Phosphate_Dehydrogenase(Km_NAD, Kmf_gapdh, Vf_gapdh, cell, GAP, NAD, switch_kashi)
  Vf_gapdh*GAP/(Kmf_gapdh + GAP)/(1 + Km_NAD/NAD)*switch_kashi/cell;
end
Function_for_Glyceraldehyde_3_Phosphate_Dehydrogenase is "Function for Glyceraldehyde 3-Phosphate Dehydrogenase [1]";

function Function_for_G6P_Dehydrogenase(cell, rateOf_re37, switch_kashi, v_PGI_ss)
  0.095*rateOf_re37/v_PGI_ss*switch_kashi/cell;
end
Function_for_G6P_Dehydrogenase is "Function for G6P Dehydrogenase [1]";

function Function_for_re60(PS_ec, O_sub_2_endsub, O_sub_2_e_endsub)
  PS_ec*(O_sub_2_e_endsub - O_sub_2_endsub);
end

function Function_for_Glycogen_Synthase_I_form(Km_AMP_2, Kmf_gs, Vf_gs, cell, h, AMP, UDPG)
  Vf_gs*UDPG/((Kmf_gs + UDPG)*(1 + Km_AMP_2^h/AMP^h))/cell;
end
Function_for_Glycogen_Synthase_I_form is "Function for Glycogen Synthase I-form [1]";

function Function_for_Lactate_Flux__in(Km, Vmax, s39)
  Vmax*s39/(Km + s39);
end
Function_for_Lactate_Flux__in is "Function for Lactate Flux (in) [1]";

function Function_for_re54(Kia_NADH, Km_DHAP, Km_NADH, cell, NADH, DHAP, vf)
  vf*DHAP*NADH/(Kia_NADH*Km_DHAP + Km_DHAP*NADH + Km_NADH*DHAP + DHAP*NADH)/cell;
end

function Function_for_re59(cell, rateOf_re58)
  rateOf_re58/cell;
end

function Function_for_re61(PS_ve, O_sub_2_v_endsub, O_sub_2_e_endsub)
  PS_ve*(O_sub_2_v_endsub - O_sub_2_e_endsub);
end

function Function_for_re22(H_active, K_Lac, X_Lac, cell, s38, Lactic_Acid)
  X_Lac*(1/K_Lac*s38*H_active - Lactic_Acid)/cell;
end

function Function_for_re62(cell, k_a, k_d, O_sub_2_endsub, Mb, MbO_sub_2_endsub)
  (k_a*Mb*O_sub_2_endsub - k_d*MbO_sub_2_endsub)/cell;
end

function Function_for_Phosphfructokinase(Km_ATP, Kmf_pfk, Vf_pfk, cell, ATP, F6P, switch_kashi)
  Vf_pfk*F6P/(Kmf_pfk + F6P)/(1 + Km_ATP/ATP)*switch_kashi/cell;
end
Function_for_Phosphfructokinase is "Function for Phosphfructokinase [1]";

function Function_for_re55(cell, rateOf_re54)
  rateOf_re54/cell;
end

function Function_for_Adenylate_Kinase(K_AK, X_AK, cell, ATP, ADP, AMP)
  X_AK*(K_AK*ADP*ADP - AMP*ATP)/cell;
end
Function_for_Adenylate_Kinase is "Function for Adenylate Kinase [1]";

function Function_for_Phosphoglucomutase(Kmf_pgm, Kmr_pgm, Vf_pgm, Vr_pgm, cell, G6P, G1P, switch_GSGP)
  (Vf_pgm*G1P/Kmf_pgm - Vr_pgm*G6P/Kmr_pgm)/(1 + G1P/Kmf_pgm + G6P/Kmr_pgm)*switch_GSGP/cell;
end
Function_for_Phosphoglucomutase is "Function for Phosphoglucomutase [1]";

function Function_for_Mitochondrial_Oxidation_of_Pyruvate(Km_ADP, Km_O2, cell, rateOf_re46, ADP, O_sub_2_endsub)
  rateOf_re46*(ADP/(ADP + Km_ADP))*(O_sub_2_endsub/(O_sub_2_endsub + Km_O2))/cell;
end

function Function_for_Hexokinase(Km_ATP, Kmf_hk, Kmr_hk, Vf_hk, Vr_hk, cell, ATP, Glucose, G6P, switch_kashi)
  (Vf_hk*Glucose/(Kmf_hk*(1 + Km_ATP/ATP)) - Vr_hk*G6P/Kmr_hk)/(1 + Glucose/Kmf_hk + G6P/Kmr_hk)*switch_kashi/cell;
end
Function_for_Hexokinase is "Function for Hexokinase [1]";

function Function_for_ATPase__ATP_Consumption(VR_cellcyto, X_atpase, cell, level, ATP)
  level*VR_cellcyto*X_atpase*(1/(1 + exp(-(ATP - 0.001)/0.0001)))/cell;
end
Function_for_ATPase__ATP_Consumption is "Function for ATPase (ATP Consumption)";

function Function_for_Glycogen_Synthase_D_form(Km_AMP_2, Kmf_gs, Vf_gs, cell, h, AMP, UDPG)
  Vf_gs*UDPG/((Kmf_gs + UDPG)*(1 + Km_AMP_2^h/AMP^h))/cell;
end
Function_for_Glycogen_Synthase_D_form is "Function for Glycogen Synthase D-form [1]";

function Function_for_Fructose_bisphosphate_Aldolase(Kmf_fbp, Vf_fbp, cell, F16BP, switch_kashi)
  Vf_fbp*F16BP/(Kmf_fbp + F16BP)*switch_kashi/cell;
end
Function_for_Fructose_bisphosphate_Aldolase is "Function for Fructose-bisphosphate Aldolase [1]";

function Function_for_Lactate_Flux__out(Km, Vmax, s38)
  Vmax*s38/(Km + s38);
end
Function_for_Lactate_Flux__out is "Function for Lactate Flux (out) [1]";

function Function_for_Phosphoglycerate_Mutase(Kmf_pgm, Kmr_pgm, Vf_pgm, Vr_pgm, cell, _3PG, _2PG, switch_kashi)
  (Vf_pgm*_3PG*(1/(1 + exp(-(_3PG - 0.0001)/1e-5)))/Kmf_pgm - Vr_pgm*_2PG*(1/(1 + exp(-(_2PG - 0.0001)/1e-5)))/Kmr_pgm)/(1 + _3PG/Kmf_pgm + _2PG/Kmr_pgm)*switch_kashi/cell;
end
Function_for_Phosphoglycerate_Mutase is "Function for Phosphoglycerate Mutase_1";

function Function_for_Pyruvate_Kinase(Km_adp, Kmf_pk, Kmr_pk, Vf_pk, Vr_pk, cell, ADP, PEP, PYR, switch_kashi)
  (Vf_pk*PEP*(1/(1 + exp(-(PEP - 0.0001)/1e-5)))/(Kmf_pk*(1 + Km_adp/ADP)) - Vr_pk*PYR*(1/(1 + exp(-(PYR - 0.0001)/1e-5)))/Kmr_pk)/(1 + PEP/Kmf_pk + PYR/Kmr_pk)*switch_kashi/cell;
end
Function_for_Pyruvate_Kinase is "Function for Pyruvate Kinase_1";

function Function_for_Glycogen_Phosphorylase(Km_AMP_2, Kmf_gp, Kmr_gp, Vf_gp, Vr_gp, cell, h, AMP, Glycogen, G1P)
  (Vf_gp*Glycogen/Kmf_gp - Vr_gp*G1P/Kmr_gp)/((1 + Glycogen/Kmf_gp + G1P/Kmr_gp)*(1 + Km_AMP_2^h/AMP^h))/cell;
end
Function_for_Glycogen_Phosphorylase is "Function for Glycogen Phosphorylase [1]";

function Function_for_Lactate_Dehydrogenase(Km_NADH, Kmf_ldh, Vf_ldh, cell, PYR, NADH, switch_LDH)
  Vf_ldh*PYR/(Kmf_ldh + PYR)/(1 + Km_NADH/NADH)*switch_LDH/cell;
end
Function_for_Lactate_Dehydrogenase is "Function for Lactate Dehydrogenase [1]";

function Function_for_Phosphoglycerate_Kinase(Km_adp, Km_atp, Kmf_pgk, Kmr_pgk, Vf_pgk, Vr_pgk, cell, ATP, ADP, _13BPG, _3PG, switch_kashi)
  (Vf_pgk*_13BPG*(1/(1 + exp(-(_13BPG - 0.0001)/1e-5)))/(Kmf_pgk*(1 + Km_adp/ADP)) - Vr_pgk*_3PG*(1/(1 + exp(-(_3PG - 0.0001)/1e-5)))/(Kmr_pgk*(1 + Km_atp/ATP)))/(1 + _13BPG/Kmf_pgk + _3PG/Kmr_pgk)*switch_kashi/cell;
end
Function_for_Phosphoglycerate_Kinase is "Function for Phosphoglycerate Kinase_1";

function Function_for_Phosphoglucose_Isomerase__forward(Kmf_pgi, Kmr_pgi, Vf_pgi, Vr_pgi, cell, G6P, F6P, switch_kashi)
  (Vf_pgi*G6P/Kmf_pgi - Vr_pgi*F6P/Kmr_pgi)/(1 + G6P/Kmf_pgi + F6P/Kmr_pgi)*switch_kashi/cell;
end
Function_for_Phosphoglucose_Isomerase__forward is "Function for Phosphoglucose Isomerase (forward) [1]";

function Function_for_Enolase(Kmf_eno, Kmr_eno, Vf_eno, Vr_eno, cell, PEP, _2PG, switch_kashi)
  (Vf_eno*_2PG*(1/(1 + exp(-(_2PG - 0.0001)/1e-5)))/Kmf_eno - Vr_eno*PEP*(1/(1 + exp(-(PEP - 0.0001)/1e-5)))/Kmr_eno)/(1 + _2PG/Kmf_eno + PEP/Kmr_eno)*switch_kashi/cell;
end
Function_for_Enolase is "Function for Enolase_1";

model McDougal2017___Metabolism_in_ischemic_cardiomyocytes()
  // McDougal2017 - Metabolism in ischemic cardiomyocytes
  // Heart disease remains the leading cause of death globally. Although reperfusion following myocardial ischemia can prevent death by restoring nutrient flow, ischemia/reperfusion injury can cause significant heart damage. The mechanisms that drive ischemia/reperfusion injury are not well understood; currently, few methods can predict the state of the cardiac muscle cell and its metabolic conditions during ischemia. Here, we explored the energetic sustainability of cardiomyocytes, using a model for cellular metabolism to predict the levels of ATP following hypoxia. We modeled glycolytic metabolism with a system of coupled ordinary differential equations describing the individual metabolic reactions within the cardiomyocyte over time. Reduced oxygen levels and ATP consumption rates were simulated to characterize metabolite responses to ischemia. By tracking biochemical species within the cell, our model enables prediction of the cell’s condition up to the moment of reperfusion. The simulations revealed a distinct transition between energetically sustainable and unsustainable ATP concentrations for various energetic demands. Our model illustrates how even low oxygen concentrations allow the cell to perform essential functions. We found that the oxygen level required for a sustainable level of ATP increases roughly linearly with the ATP consumption rate. An extracellular O2 concentration of ~0.007 mM could supply basic energy needs in non-beating cardiomyocytes, suggesting that increased collateral circulation may provide an important source of oxygen to sustain the cardiomyocyte during extended ischemia. Our model provides a time-dependent framework for studying various intervention strategies to change the outcome of reperfusion.
  // isDescribedBy pubmed:28487363
  // biomodels.db:MODEL1912160001
  // occursIn CL:0000746
  // hasProperty efo:0002687 efo:0003777 GO:0071456 GO:0006096 efo:1001375 GO:0046034
  // biomodels.db:MODEL1912160001 biomodels.db:BIOMD0000000961
  // hasProperty mamo:MAMO_0000046

  // Compartments:
  compartment cell = 1;  // isVersionOf ncit:C12508; isVersionOf ncit:C13002
  compartment extracellular = 0.240633296;  // isVersionOf GO:0005576
  compartment vessel = 0.06842;  // isVersionOf ncit:C12679
  compartment default = 1;

  // Species:
  species s1 in cell = 7.94e-5; s1 is "H_super__plus__endsuper__sub_i_endsub_";  // CHEBI:15378
  species s2 in default = 1e-12; s2 is "H_super__plus__endsuper__sub_o_endsub_";  // CHEBI:15378
  species s7 in cell = 1e-12; s7 is "OH_super__minus__endsuper__sub_i_endsub_";  // CHEBI:16234
  species s8 in default = 1e-12; s8 is "OH_super__minus__endsuper__sub_o_endsub_";  // CHEBI:16234
  species $pH_sub_i_endsub in cell = 7.1; pH_sub_i_endsub is "pH_sub_i_endsub_";  // isVersionOf omit:0008003
  species s24 in cell = 5; s24 is "Na_super__plus__endsuper__sub_i_endsub_";  // CHEBI:29101
  species s25 in default = 1e-12; s25 is "Na_super__plus__endsuper__sub_o_endsub_";  // CHEBI:29101
  species s26 in cell = 25; s26 is "HCO_sub_3_endsub__super__minus__endsuper__sub_i_endsub_";  // CHEBI:17544
  species s27 in default = 1e-12; s27 is "HCO_sub_3_endsub__super__minus__endsuper__sub_o_endsub_";  // CHEBI:17544
  species s28 in cell = 1e-12; s28 is "Cl_super__minus__endsuper__sub_i_endsub_";  // CHEBI:17996
  species s29 in default = 1e-12; s29 is "Cl_super__minus__endsuper__sub_o_endsub_";  // CHEBI:17996
  species ATP in cell = 7;  // CHEBI:15422
  species ADP in cell = 1e-12;  // CHEBI:16761
  // Initial value 6.94 mM from Kashiwaya et al_1994_Control of glucose utilization in working perfused rat heart
  species P_sub_i_endsub in cell = 7; P_sub_i_endsub is "P_sub_i_endsub_";  // CHEBI:24838
  species CrP in cell = 25;  // CHEBI:58092
  species Cr in cell = 1e-12;  // CHEBI:16919
  species AMP in cell = 1e-5;  // CHEBI:16027
  species Glycogen in cell = 21.4;  // CHEBI:28087
  species s38 in cell = 0.683; s38 is "L_super__minus__endsuper__sub_i_endsub_";  // CHEBI:24996
  species Lactic_Acid in cell = 155.84;  // isVersionOf CHEBI:28358
  species G6P in cell = 0.169;  // CHEBI:4170
  species F6P in cell = 0.041;  // CHEBI:88003
  species GAP in cell = 0.00162;  // CHEBI:17138
  species PEP in cell = 0.013;  // CHEBI:18021
  species CO_sub_2_endsub in cell = 1e-12; CO_sub_2_endsub is "CO_sub_2_endsub_";  // CHEBI:16526
  species F16BP in cell = 0.000678;  // hasVersion CHEBI:78682
  species DHAP in cell = 0.036;  // CHEBI:16108
  species _13BPG in cell = 0.000869;  // isVersionOf CHEBI:89363
  species _3PG in cell = 0.071;  // CHEBI:57998
  species _2PG in cell = 0.009;  // CHEBI:88350
  species H_sub_2_endsub_O in cell = 1e-12;  // CHEBI:15377
  species G1P in cell = 0.02;  // CHEBI:16077
  species UDPG in cell = 0.099;  // CHEBI:18066
  species UTP in cell = 0.194;  // CHEBI:15713
  species UDP in cell = 0.034;  // CHEBI:17659
  species _6PGN in cell = 1e-12;  // CHEBI:16938
  species Glycerol_3_P in cell = 0.158; Glycerol_3_P is "Glycerol-3-P";  // CHEBI:15978
  species $s78 in cell = 1e-12;
  species PYR in cell = 0.055;  // CHEBI:15361
  species G16BP in cell = 0.007;  // CHEBI:17680
  species O_sub_2_e_endsub in extracellular = 0.128856; O_sub_2_e_endsub is "O_sub_2,e_endsub";  // CHEBI:33263
  species Mb in cell = 0.00543;  // CHEBI:7044
  species MbO_sub_2_endsub in cell = 0.185; MbO_sub_2_endsub is "MbO_sub_2_endsub_";  // isVersionOf CHEBI:7044
  species O_sub_2_endsub in cell = 0.110169;  // CHEBI:33263
  species $O_sub_2_v_endsub in vessel = 0.132593; O_sub_2_v_endsub is "O_sub_2,v_endsub";  // CHEBI:33263
  species $NAD in cell = 2.2565;  // CHEBI:13389
  species $NADH in cell = 0.7135;  // CHEBI:16908
  species $s39 in default = 1.13; s39 is "L_super__minus__endsuper__sub_o_endsub_";  // CHEBI:24996
  species $Glucose in cell = 1.91;  // CHEBI:17234

  // Parameters:
  J_NHE has unit_0;
  J_CHE has unit_0;
  J_NHS has unit_0;
  J_AE has unit_0;
  beta_i has unit_1;
  beta_CO2 has unit_1;
  H_active has unit_2;
  // Lagadic-Gossmann et al_1992_Role of bicarbonate in pH recovery from intracellular acidosis in the
  pH_o = 7.4 unit_3;
  // Lagadic-Gossmann et al_1992_Role of bicarbonate in pH recovery from intracellular acidosis in the
  HCO3_o = 23 unit_4;
  HCO3_i has unit_4;
  switch_kashi = 1 unit_3;
  h = 1.5 unit_4;
  Km_AMP_2 = 0.016 unit_4;
  switch_GSGP = 1 unit_3;
  switch_LDH = 1 unit_3;
  level = 1 unit_3;
  lowO2 = 0.0175;
  K_AK = 1;
  X_AK = 10000;
  VR_cellcyto = 1.4703;
  X_atpase = 0.39;
  K_CK = 1660000;
  X_CK = 10000;
  Kmf_eno = 0.045;
  Kmr_eno = 0.089;
  Vf_eno = 1.85;
  Vr_eno = 2;
  Kmf_fbp = 0.038;
  Vf_fbp = 0.991667;
  Km_NAD = 0.058;
  Kmf_gapdh = 0.042;
  Vf_gapdh = 5.35;
  Kmf_gp = 0.1;
  Kmr_gp = 5;
  Vf_gp = 0.781667;
  Vr_gp = 55.8333;
  Kmf_gs_I_form = 0.08;
  Vf_gs_I_form = 0.146833;
  Kmf_gs_D_form = 1.42;
  Vf_gs_D_form = 0.146833;
  Km_ATP_hk = 0.236;
  Kmf_hk = 0.072;
  Kmr_hk = 0.042;
  Vf_hk = 0.55;
  Vr_hk = 0.000106;
  Km_NADH = 0.001;
  Kmf_ldh = 0.125;
  Vf_ldh = 23.9333;
  Km_Lac_flux_in = 2.2;
  Vmax_Lac_flux_in = 0.04817;
  Km_Lac_flux_out = 6.92;
  Vmax_Lac_flux_out = 0.1817;
  Km_ADP = 0.00107;
  Km_O2 = 0.00297;
  Km_ATP_pfk = 0.127;
  Kmf_pfk = 0.224;
  Vf_pfk = 1.32833;
  Kmf_pgm = 0.045;
  Kmr_pgm = 0.67;
  Vf_pgm = 1.93333;
  Vr_pgm = 1.12;
  Kmf_pgi = 0.425;
  Kmr_pgi = 0.175;
  Vf_pgi = 10.0667;
  Vr_pgi = 9.6;
  Km_ADP_pgk = 0.008;
  Km_ATP_pgk = 0.565;
  Kmf_pgk = 0.021;
  Kmr_pgk = 0.51;
  Vf_pgk = 251;
  Vr_pgk = 15.9833;
  Kmf_pglym = 0.145;
  Kmr_pglym = 0.139;
  Vf_pglym = 11.2333;
  Vr_pglym = 48;
  Km_ADP_pk = 0.00268;
  Kmf_pk = 0.11;
  Kmr_pk = 10;
  Vf_pk = 9.43333;
  Vr_pk = 0.00105;
  K_Lac = 0.12589;
  X_Lac = 10000;
  K_up = 4.36;
  X_up = 10000;
  f_up_eq = 8808;
  Kia_NADH = 0.00107;
  Km_DHAP = 0.3;
  Km_NADH_re54 = 0.00284;
  Km_G1P = 0.008;
  Km_GBP = 0.565;
  Kmf_GBPS = 0.021;
  Kmr_GBPS = 0.51;
  Vf_GBPS = 10;
  Vr_GBPS = 6;
  PS_ec = 10;
  PS_ve = 50;
  k_a = 15400;
  k_d = 60;
  Kmf_tpi = 1.53;
  Vf_tpi = 5.93333;
  v_PGI_ss = 0.22;

  // Assignment rules:
  J_NHE := 1/60*(20.60926*pH_sub_i_endsub^4 - 606.5563*pH_sub_i_endsub^3 + 6701.065*pH_sub_i_endsub^2 - 32930.55*pH_sub_i_endsub + 60727.93);
  J_CHE := 1/60*(-0.272561314*pH_sub_i_endsub^4 + 12.31301*pH_sub_i_endsub^3 - 181.7704*pH_sub_i_endsub^2 + 1108.619*pH_sub_i_endsub - 2422.84);
  J_NHS := 1/60*(2.329005*pH_sub_i_endsub^3 - 45.17652*pH_sub_i_endsub^2 + 286.7707*pH_sub_i_endsub - 592.1682);
  J_AE := 1/60*(-15.22666*pH_sub_i_endsub^4 + 302.259*pH_sub_i_endsub^3 - 1823.153*pH_sub_i_endsub^2 + 1976.496*pH_sub_i_endsub + 8383.534);
  rateOf_re37 := Phosphoglucose_Isomerase_forward;
  rateOf_re54 := re54;
  rateOf_re20 := Lactate_Flux_out;
  H_active := 1000*10^(-pH_sub_i_endsub);
  rateOf_re15 := Lactate_Flux_in;
  rateOf_re46 := Pyruvate_Kinase;
  rateOf_re58 := re58;
  HCO3_i := HCO3_o*10^(pH_sub_i_endsub - pH_o);
  beta_CO2 := 2.3*HCO3_i;
  beta_i := -28*pH_sub_i_endsub + 222.6;

  // Reactions:
  re2: s25 => s24; Constant_flux__irreversible(J_NHE);
  re3: s25 => s24; Constant_flux__irreversible(J_NHS);
  re4: s27 => s26; Constant_flux__irreversible(J_NHS);
  re5: s26 => s27; Constant_flux__irreversible(J_AE);
  re6: s29 => s28; Constant_flux__irreversible(J_AE);
  re7: s29 => s28; Constant_flux__irreversible(J_CHE);
  re8: s7 => s8; Constant_flux__irreversible(J_CHE);
  ATPase_ATP_Consumption: ATP => ADP + P_sub_i_endsub + s1; cell*Function_for_ATPase__ATP_Consumption(VR_cellcyto, X_atpase, cell, level, ATP); ATPase_ATP_Consumption is "ATPase (ATP Consumption)";
  Creatine_Kinase: ADP + CrP => ATP + Cr; cell*k1*ADP*CrP;
    k1 = 0.1;
  Adenylate_Kinase: 2 ADP => ATP + AMP; cell*Function_for_Adenylate_Kinase(K_AK, X_AK, cell, ATP, ADP, AMP);
  Lactate_Flux_in: $s39 => s38; Function_for_Lactate_Flux__in(Km_Lac_flux_in, Vmax_Lac_flux_in, s39); Lactate_Flux_in is "Lactate Flux (in)";
  co_Lactate_Flux_in: s2 => s1; Constant_flux__irreversible(rateOf_re15); co_Lactate_Flux_in is "co-Lactate Flux (in)";
  Lactate_Flux_out: s38 => $s39; Function_for_Lactate_Flux__out(Km_Lac_flux_out, Vmax_Lac_flux_out, s38); Lactate_Flux_out is "Lactate Flux (out)";
  co_Lactate_Flux_out: s1 => s2; Constant_flux__irreversible(rateOf_re20); co_Lactate_Flux_out is "co-Lactate Flux (out)";
  re22: s38 + s1 => Lactic_Acid; cell*Function_for_re22(H_active, K_Lac, X_Lac, cell, s38, Lactic_Acid);
  Hexokinase: $Glucose + ATP => G6P + ADP + s1; cell*Function_for_Hexokinase(Km_ATP_hk, Kmf_hk, Kmr_hk, Vf_hk, Vr_hk, cell, ATP, Glucose, G6P, switch_kashi);
  Phosphoglucose_Isomerase_forward: G6P => F6P; cell*Function_for_Phosphoglucose_Isomerase__forward(Kmf_pgi, Kmr_pgi, Vf_pgi, Vr_pgi, cell, G6P, F6P, switch_kashi); Phosphoglucose_Isomerase_forward is "Phosphoglucose Isomerase (forward)";
  Phosphfructokinase: F6P + ATP => F16BP + ADP + s1; cell*Function_for_Phosphfructokinase(Km_ATP_pfk, Kmf_pfk, Vf_pfk, cell, ATP, F6P, switch_kashi);
  Fructose_bisphosphate_Aldolase: F16BP => GAP + DHAP; cell*Function_for_Fructose_bisphosphate_Aldolase(Kmf_fbp, Vf_fbp, cell, F16BP, switch_kashi); Fructose_bisphosphate_Aldolase is "Fructose-bisphosphate Aldolase";
  Triosephosphate_Isomerase: DHAP => GAP; cell*Function_for_Triosephosphate_Isomerase(Kmf_tpi, Vf_tpi, cell, DHAP, switch_kashi);
  re42: GAP + $NAD + P_sub_i_endsub => _13BPG + $NADH + s1; cell*Function_for_Glyceraldehyde_3_Phosphate_Dehydrogenase(Km_NAD, Kmf_gapdh, Vf_gapdh, cell, GAP, NAD, switch_kashi); re42 is "Glyceraldehyde 3-Phosphate Dehydrogenase";
  Phosphoglycerate_Kinase: _13BPG + ADP => _3PG + ATP; cell*Function_for_Phosphoglycerate_Kinase(Km_ADP_pgk, Km_ATP_pgk, Kmf_pgk, Kmr_pgk, Vf_pgk, Vr_pgk, cell, ATP, ADP, _13BPG, _3PG, switch_kashi);
  Phosphoglycerate_Mutase: _3PG => _2PG; cell*Function_for_Phosphoglycerate_Mutase(Kmf_pglym, Kmr_pglym, Vf_pglym, Vr_pglym, cell, _3PG, _2PG, switch_kashi);
  Enolase: _2PG => PEP + H_sub_2_endsub_O; cell*Function_for_Enolase(Kmf_eno, Kmr_eno, Vf_eno, Vr_eno, cell, PEP, _2PG, switch_kashi);
  Pyruvate_Kinase: PEP + ADP + s1 => PYR + ATP; cell*Function_for_Pyruvate_Kinase(Km_ADP_pk, Kmf_pk, Kmr_pk, Vf_pk, Vr_pk, cell, ADP, PEP, PYR, switch_kashi);
  Phosphoglucomutase: G1P => G6P; cell*Function_for_Phosphoglucomutase(Kmf_pgm, Kmr_pgm, Vf_pgm, Vr_pgm, cell, G6P, G1P, switch_GSGP);
  re48: G1P + UTP => UDPG + 2 P_sub_i_endsub; cell*Function_for_re48(K_up, Km_AMP_2, X_up, cell, f_up_eq, h, AMP, G1P, UDPG);  // modifiers: AMP
  Glycogen_Synthase_D_form: UDPG => Glycogen + UDP; cell*Function_for_Glycogen_Synthase_D_form(Km_AMP_2, Kmf_gs_D_form, Vf_gs_D_form, cell, h, AMP, UDPG); Glycogen_Synthase_D_form is "Glycogen Synthase D-form";  // modifiers: AMP
  Glycogen_Phosphorylase: Glycogen + P_sub_i_endsub => G1P; cell*Function_for_Glycogen_Phosphorylase(Km_AMP_2, Kmf_gp, Kmr_gp, Vf_gp, Vr_gp, cell, h, AMP, Glycogen, G1P);  // modifiers: AMP
  Lactate_Dehydrogenase: PYR + $NADH + s1 => s38 + $NAD; cell*Function_for_Lactate_Dehydrogenase(Km_NADH, Kmf_ldh, Vf_ldh, cell, PYR, NADH, switch_LDH);
  G6P_Dehydrogenase: G6P => _6PGN + P_sub_i_endsub; cell*Function_for_G6P_Dehydrogenase(cell, rateOf_re37, switch_kashi, v_PGI_ss);
  Glycogen_Synthase_I_form: UDPG => Glycogen + UDP; cell*Function_for_Glycogen_Synthase_I_form(Km_AMP_2, Kmf_gs_I_form, Vf_gs_I_form, cell, h, AMP, UDPG); Glycogen_Synthase_I_form is "Glycogen Synthase I-form";  // modifiers: AMP
  re54: DHAP + $NADH => Glycerol_3_P + $NAD; cell*Function_for_re54(Kia_NADH, Km_DHAP, Km_NADH_re54, cell, NADH, DHAP, vf);
    vf = 20;
  re55: Glycerol_3_P => $s78 + P_sub_i_endsub; cell*Function_for_re55(cell, rateOf_re54);
  re56: 15 ADP + PYR + 3 O_sub_2_endsub + 15 P_sub_i_endsub + $NADH => 15 ATP + 3 CO_sub_2_endsub + $NAD; cell*Function_for_Mitochondrial_Oxidation_of_Pyruvate(Km_ADP, Km_O2, cell, rateOf_re46, ADP, O_sub_2_endsub); re56 is "Mitochondrial Oxidation of Pyruvate";
  re58: _13BPG + G1P => _3PG + G16BP; cell*Function_for_re58(Km_G1P, Km_GBP, Kmf_GBPS, Kmr_GBPS, Vf_GBPS, Vr_GBPS, cell, _13BPG, _3PG, G1P, G16BP, switch_kashi);
  re59: G16BP => $s78 + 2 P_sub_i_endsub; cell*Function_for_re59(cell, rateOf_re58);
  re60: O_sub_2_e_endsub => O_sub_2_endsub; Function_for_re60(PS_ec, O_sub_2_endsub, O_sub_2_e_endsub);
  re61: $O_sub_2_v_endsub => O_sub_2_e_endsub; Function_for_re61(PS_ve, O_sub_2_v_endsub, O_sub_2_e_endsub);
  re62: Mb + O_sub_2_endsub => MbO_sub_2_endsub; cell*Function_for_re62(cell, k_a, k_d, O_sub_2_endsub, Mb, MbO_sub_2_endsub);

  // Events:
  Hypoxia: at (time > 100): O_sub_2_v_endsub = lowO2;

  // Unit definitions:
  unit length = metre;
  unit area = metre^2;
  unit volume = litre;
  unit time = second;
  unit substance = 1e-3 mole;
  unit unit_0 = 1e-3 mole * litre * second; unit_0 is "mmol*l*s";
  unit unit_1 = 1e-3 mole * litre; unit_1 is "mmol*l";
  unit unit_2 = 1e-3 mole / litre; unit_2 is "mmol/l";
  unit unit_3 = dimensionless^0; unit_3 is "1";
  unit unit_4 = 1e-3 mole; unit_4 is "mmol";
end
